# AguaClara Water Treatment Plants -- Gracias
# Automated Design
# Add variable descriptions next to every varible so it is easy to interpret what this all means.
AguaClaraDesignToolVersion := 10  # This is used by LabVIEW to confirm that a valid design tool program is open
# User Inputs:
HW_Sed := 2 m
# Design References
# [reference: LabVIEWInputs.xmcd]
# Use LabVIEWInputs when this is run by LabVIEW.
# Use UserInputs to use the program in MathCAD
# Change the reference by
# - right clicking
# - select properties
# - reference tab
# - type in the correct file name
# [reference: DesignAssumptions.xmcd]
# [reference: MathFunctions.xmcd]
# [reference: PipeDatabase.xmcd]
# [reference: MinorLossCoefficients.xmcd]
# [reference: FluidsFunctions.xmcd]
# Sed Tanks and Slopes:
# [reference: Influent Sed Manifold.xmcd]
N_SedTanks = 3
B_SedPort = 5.6416 cm  # Height of the narrowest part of the manifold ports
W_SedPort = 5.6416 cm
H_SedBetween = 7.62 cm  # Distance from the top of the inlet manifold to the bottom of the ledge supporting the lamella frame
N_SedPorts = 41  # per bay
L_Sed = 2.60571 m
N_SlopePairs = 1  # Number of bays of inlet manifolds in each sed tank
# N.SlopePairs to be changed to N.SedBays | Port Area
L_SedPort*B_SedPort = 36.7514 cm^2
L_SedPort = 6.51436 cm  # Length of the port through which water exits the inlet manifold
W_SedSludgeFlat = 5 cm  # Distance between tips of manifold plates (space alloted for the drain holes
W_SedSlopePlate = 30 cm  # Width of ferrous cement plates in whice one manifold port is cut
AN_SedTopInlet = 60 deg  # Angle of the top of the inlet manifold
AN_SedBottom = 10 deg  # Angle of the bottom of inlet manifold
# Sedimentation Tank Sludge Drain:
# [reference: SludgeDrain.xmcd]
N_SedSludge = 1  # Eliminate this variable
N_SedSludgeOrifices = 17  # per cell
W_SedSludge = 9.12073 cm  # Width of the sludge channel
Time_SludgeDrain = 10 min  # Tank Drain time
H_SedSludge = 5 cm  # Depth of the sludge channel
B_SedSludgeOrifices = 15 cm  # Distance center to center between drain orifices
T_SedSludge = 9.33013 cm
# Thickness of the plate topping the sludge channel
# through which drain holes are formed
D_SedSludgeOrifice = 0.708661 in  # Diameter of drain orifices
# Sedimentation Tank Dimensions:
# [reference: Sedimentation Dimensions.xmcd]
Z_SedSludge = 14.3301 cm  # Height from 0 of the top of the sludge drain
H_SedBottomSlope = 0.0761201 m  # Height of the bottom slope
H_SedTopSlope = 0.704423 m  # Height of the top of the inlet manifold
Z_SedSlopes = 0.947724 m  # Height from 0 of the top of the inlet manifold
H_Sed = 2.1 m  # Total tank wall height
W_Sed = 1 m  # Total tank width
L_Sed = 2.60571 m  # Total tank length
# Inlet Channel:
# [reference: Inlet Channel.xmcd]
W_InletChannel = 0.154932 m
L_Channel = 3.45 m
W_SedManifoldEntrance = 0.0533324 m  # Width of the drop chimneys connecting channel to sed inlet manifolds
L_SedManifoldEntrance = 0.431699 m  # length of drop chimmneys
N_SedInletPipes = 2  # per sed bay
H_InletChannel = 0.926076 m
# Sedimentation Tank Effluent Launder:
# [reference: Launder.xmcd]
N_SedLaunderOrifices = 42  # Number of orifices per launder
# How many launders per cell?
# What is the spacing of the orfices?
# How many rows of orifices per launder?
Q_SedLaunderOrifices = 1.50794 L/min
B_SedLaunderOrifices = 0.1 m  # Center to center launder spacing
# Exit Channel:
# [reference: Exit Channel.xmcd]
W_ExitChannel = 0.154932 m
ND_SedLaunder = 3 in
H_ExitChannel = 0.926076 m
L_SedLaunder = 2.14585 m
L_ExitChannel = 3.45 m
H_PltWeir = 0.748291 m  # height of the weir carrying water to the distribution tank
D_SedLaunderOrifice = 0.314961 in
HW_ExitChannel = 0.786076 m
Z_SedLaunder = 1.91555 m  # height from 0 of the launder
ZW_ExitChannel = 1.96 m  # water height in exit channel from 0
# Lamella:
# [reference: Lamella.xmcd]
L_SedPlate = 0.908577 m
B_SedPlate = 3.60432 cm  # center to center distance between lamella
S_SedPlate = 3.30432 cm  # spacing between lamella
N_SedPlates = 39  # Number of Sed Plates per Sedimentation Tank Bay.
AN_SedPlate = 60 deg
V_SedC = 10.0483 m/day
V_SedUp = 70 m/day
H_SedPlate = 0.786851 m
H_SedAbove = 0.1289 m  # Height of water needed above the lamella
# Sedimentation Tank Floc Hopper:
# [reference: Floc Hopper.xmcd]
A_FlocHopper = 0.65664 m^2
L_FlocHopper = 0.65664 m  # Length of the hopper cement plate
L_FlocHopperOffset = 0.454289 m  # distance from the edge of the channel to the bottom of the first lamella (collection distance)
W_FlocHopper = 1 m  # width of the hopper set within each bay
# Flow Controller:
# [reference: FCM.xmcd]
N_Fcm = 1
ID_FcmTube = 3.175 mm
ID_FcmTube = 0.125 in
L_FcmTube = 99.0625 cm
Q_FcmTubeMax = 285 mL/min
HL_FcmValve = 15.0907 cm
# Flocculator: | Look at Flocculator Positioning arrays
# [reference: Flocculation Energy Dissapation.xmcd]
W_FlocChannel = 0.45 m
L_Sed = 2.60571 m  # Fill last channel with bafffles from last channel
# Fix port width to be based on energy dissipation in that channel
# Adjust spacing after the number of baffles per channel is known.
ED_Floc = [6.4; 1.6; 0.4] mW/kg
# Check the residence time of the flocculator should be at least 20minutes
S_FlocBaffle = [8.03403; 12.7532; 20.2445] cm
B_FlocBaffle = [8.43403; 13.1532; 20.6445] cm
HW_FlocEnd = 2 m
L_FlocBaffles = [
    1.91966, 1.87247, 1.87247, 1.79756;
    2.22395, 2.17676, 2.17676, 2.10185;
    1.91966, 1.87247, 1.79756, 1.79756;
    2.22395, 2.17676, 2.10185, 2.10185;
    1.91966, 1.87247, 1.79756, 1.79756;
    2.22395, 2.17676, 2.10185, 2.10185;
    1.91966, 1.87247, 1.79756, 1.79756;
    2.22395, 2.17676, 2.10185, 2.10185;
    1.91966, 1.87247, 1.79756, 1.79756;
    2.22395, 2.17676, 2.10185, 2.10185;
    1.91966, 1.87247, 1.79756, 1.79756;
    2.22395, 2.17676, 0, 0;
    1.91966, 1.87247, 0, 0;
    2.22395, 2.17676, 0, 0;
    1.91966, 1.87247, 0, 0;
    2.22395, 2.17676, 0, 0;
    1.91966, 1.87247, 0, 0;
    2.22395, 0, 0, 0;
    1.91966, 0, 0, 0;
    2.22395, 0, 0, 0;
    1.91966, 0, 0, 0;
    2.17676, 0, 0, 0;
    1.87247, 0, 0, 0;
    2.17676, 0, 0, 0
] m
X_FlocBaffles = [
    0.206445, 2.38827, 0.217445, 2.38827;
    0.290785, 2.25674, 0.348977, 2.18182;
    0.375125, 2.1252, 0.555422, 1.97538;
    0.459466, 1.99367, 0.761867, 1.76893;
    0.543806, 1.86214, 0.968312, 1.56249;
    0.628146, 1.73061, 1.17476, 1.35605;
    0.712487, 1.59908, 1.3812, 1.1496;
    0.796827, 1.46754, 1.58765, 0.943155;
    0.881167, 1.33601, 1.79409, 0.736711;
    0.965507, 1.20448, 2.00054, 0.530266;
    1.04985, 1.07295, 2.20698, 0.323821;
    1.13419, 0.941415, 0, 0;
    1.21853, 0.809882, 0, 0;
    1.30287, 0.67835, 0, 0;
    1.38721, 0.546818, 0, 0;
    1.47155, 0.415285, 0, 0;
    1.55589, 0.283753, 0, 0;
    1.64023, 0, 0, 0;
    1.72457, 0, 0, 0;
    1.80891, 0, 0, 0;
    1.89325, 0, 0, 0;
    2.02478, 0, 0, 0;
    2.15632, 0, 0, 0;
    2.28785, 0, 0, 0
] m
N_FlocChannels = 4
L_FlocTank = 10.4229 m
N_FlocBaffleSection = [21; 21; 21]
3*21 = 63
HL_Floc = 20.429 cm
HW_FlocStart = 2.20429 m
Z_FlocBaffles = [
    0, 0, 0, 0;
    0.0803403, 0.127532, 0.127532, 0.202445;
    0, 0, 0, 0;
    0.0803403, 0.127532, 0.202445, 0.202445;
    0, 0, 0, 0;
    0.0803403, 0.127532, 0.202445, 0.202445;
    0, 0, 0, 0;
    0.0803403, 0.127532, 0.202445, 0.202445;
    0, 0, 0, 0;
    0.0803403, 0.127532, 0.202445, 0.202445;
    0, 0, 0, 0;
    0.0803403, 0.127532, 0, 0;
    0, 0, 0, 0;
    0.0803403, 0.127532, 0, 0;
    0, 0, 0, 0;
    0.0803403, 0.127532, 0, 0;
    0, 0, 0, 0;
    0.0803403, 0, 0, 0;
    0, 0, 0, 0;
    0.0803403, 0, 0, 0;
    0, 0, 0, 0;
    0.127532, 0, 0, 0;
    0, 0, 0, 0;
    0.127532, 0, 0, 0
] m
W_FlocPort = 0.202445 m
H_FlocPort = 0.528265 m
θ_Floc = 24.6857 min  # residence time of the flocculator
# Entrance Tank:
# [reference: EntranceTankDim.xmcd]
L_Et = 2.60571 m  # length of the entrance tank
W_Et = 0.45 m  # width of the entrance tank
HW_EtMin = 0.2 m
HW_EtMax = 0.4 m
H_Et = 2.60429 m  # height of the entrance tank
ZW_Et = 2.50429 m
# Any additional needed elevations should be calculated in the files above.
# Elevations:
ZW_ExitChannel = 1.96 m  # Water Level at the end of the plant in the exit channel and exit channel box
HW_Sed = 2 m
HW_FlocStart = 2.20429 m  # Water level at the beginning of the floc tank
HL_Floc = 20.429 cm  # just for ref. the head loss throught the floc tank
ZW_Et = 2.50429 m  # the height of the water in the entrance tank.
# AutoCAD References
# [reference: basics.xmcd]
# [reference: pipe.xmcd]
# [reference: tank.xmcd]
# [reference: lamina.xmcd]
# [reference: laminaplain.xmcd]
# [reference: cross.xmcd]
# [reference: Tee.xmcd]
# [reference: elbow.xmcd]
# [reference: Sludge.xmcd]
# [reference: Channel.xmcd]
# [reference: Manifold.xmcd]
# [reference: SedTankslopes.xmcd]
# [reference: inletslope.xmcd]
# [reference: inletslopetrapezoid.xmcd]
# [reference: chemicalstock.xmcd]
# [reference: Sedimentation Tank.xmcd]
# [component: inputs SedTank]
# [reference: Flocculation Tank.xmcd]
# [component: inputs FlocTank]
# [reference: Entrance Tank.xmcd]
# [component: inputs EntranceTank]
